astra neutral diagnostic
0
0 0 0
40 2 12
0.044121212121212186 0.0 0.4110121212121213
0
SURFACE
forward
12 1 80 1
COMPONENT
1
YDUPLICATE
0
SECTION
-1.60000000 0.00000000 1.20000000 2.00000000 0
CONTROL
pitch 1.0 0.000000000000 0 1 0 1
AFILE
section.dat
SECTION
-1.60000000 6.00000000 1.20000000 2.00000000 0
CONTROL
pitch 1.0 0.000000000000 0 1 0 1
AFILE
section.dat
SURFACE
rear
12 1 80 1
COMPONENT
2
YDUPLICATE
0
SECTION
1.90000000 0.00000000 1.75000000 1.60000000 0
AFILE
section.dat
SECTION
1.90000000 5.00000000 1.75000000 1.60000000 0
AFILE
section.dat
