opus neutral diagnostic
0
0 0 0
38 1.8 11
0.631963687150838 0.0 0.4670139664804469
0
SURFACE
lower
12 1 80 1
COMPONENT
1
YDUPLICATE
0
SECTION
0.00000000 0.00000000 0.00000000 1.80000000 0
AFILE
section.dat
SECTION
0.00000000 1.40000000 0.00000000 1.80000000 0
AFILE
section.dat
SECTION
0.00000000 3.50000000 0.03665564 1.80000000 0
AFILE
section.dat
SECTION
0.00000000 5.50000000 0.07156577 1.80000000 0
AFILE
section.dat
SURFACE
upper
12 1 80 1
COMPONENT
2
YDUPLICATE
0
SECTION
0.00000000 0.00000000 1.80000000 1.80000000 0
AFILE
section.dat
SECTION
0.00000000 1.40000000 1.80000000 1.80000000 0
AFILE
section.dat
SECTION
0.00000000 3.50000000 1.83665564 1.80000000 0
AFILE
section.dat
SECTION
0.00000000 5.50000000 1.87156577 1.80000000 0
AFILE
section.dat
SURFACE
tail_inner
12 1 4 1
COMPONENT
3
YDUPLICATE
0
SECTION
4.50000000 0.00000000 0.60000000 1.10000000 0
SECTION
4.50000000 0.25000000 0.60000000 1.10000000 0
SURFACE
tail_outer
12 1 40 1
COMPONENT
3
YDUPLICATE
0
SECTION
4.50000000 0.25000000 0.60000000 1.60000000 0
CONTROL
pitch 1.0 0.687500000000 0 1 0 1
SECTION
4.50000000 2.20000000 0.60000000 1.60000000 0
CONTROL
pitch 1.0 0.687500000000 0 1 0 1
