Fable V15 power-off lifting surfaces only
0
0 0 0
42 1.85 11.5
1.52236 0 0.78455
0
SURFACE
lower
12 1 64 1
COMPONENT
1
YDUPLICATE
0
SECTION
0.950000 0.000000 0.000000 1.850000 0.000000
AFILE
section.dat
SECTION
0.950000 5.750000 0.000000 1.850000 0.000000
AFILE
section.dat
SURFACE
upper_neutral
12 1 64 1
COMPONENT
2
YDUPLICATE
0
SECTION
0.950000 0.000000 1.850000 1.850000 0.000000
AFILE
section.dat
SECTION
0.950000 5.750000 1.850000 1.850000 0.000000
AFILE
section.dat
SURFACE
tail_halves
12 1 32 1
COMPONENT
3
YDUPLICATE
0
SECTION
5.400000 0.550000 0.775000 1.000000 -4.000000
CONTROL
pitch 1.0 0.25 0 1 0 1
SECTION
5.400000 2.850000 0.775000 1.000000 -4.000000
CONTROL
pitch 1.0 0.25 0 1 0 1
SURFACE
fin_fixed
12 1 16 1
COMPONENT
5
SECTION
5.400000 0.000000 1.800000 1.200000 0.000000
SECTION
5.400000 0.000000 1.200000 1.200000 0.000000
SURFACE
rudder_all_moving
12 1 16 1
COMPONENT
6
SECTION
6.600000 0.000000 1.800000 0.900000 0.000000
CONTROL
yaw 1.0 0.0 0 0 -1 1
SECTION
6.600000 0.000000 0.800000 0.900000 0.000000
CONTROL
yaw 1.0 0.0 0 0 -1 1
