Fable V15 power-off lateral surface screen; no body/propeller
0
0 0 0
42 1.85 11.5
1.600991301156 0.000000000000 0.783925243628
0
SURFACE
lower
12 1 64 1
COMPONENT
1
YDUPLICATE
0
SECTION
0.950000 0.000000 0.000000 1.850000 0.000000
AFILE
section.dat
SECTION
0.950000 5.750000 0.000000 1.850000 0.000000
AFILE
section.dat
SURFACE
upper_center
12 1 47 1
COMPONENT
2
YDUPLICATE
0
SECTION
0.950000 0.000000 1.850000 1.850000 0.000000
AFILE
section.dat
SECTION
0.950000 4.250000 1.850000 1.850000 0.000000
AFILE
section.dat
SURFACE
upper_tip_pair
12 1 17 1
COMPONENT
2
YDUPLICATE
0
SECTION
0.950000 4.250000 1.850000 1.850000 0.000000
AFILE
section.dat
CONTROL
roll 1.0 0.0 0 1 0 -1
SECTION
0.950000 5.750000 1.850000 1.850000 0.000000
AFILE
section.dat
CONTROL
roll 1.0 0.0 0 1 0 -1
SURFACE
tail_halves
12 1 32 1
COMPONENT
4
YDUPLICATE
0
SECTION
5.400000 0.550000 0.775000 1.000000 -4.000000
CONTROL
pitch 1.0 0.0 0 1 0 1
SECTION
5.400000 4.575000 0.775000 1.000000 -4.000000
CONTROL
pitch 1.0 0.0 0 1 0 1
SURFACE
fin_fixed
12 1 24 1
COMPONENT
5
SECTION
5.400000 0.000000 1.800000 1.200000 0.000000
SECTION
5.400000 0.000000 1.200000 1.200000 0.000000
SURFACE
rudder_upper
12 1 24 1
COMPONENT
5
SECTION
6.600000 0.000000 1.800000 0.900000 0.000000
CONTROL
yaw 1.0 0.0 0 0 -1 1
SECTION
6.600000 0.000000 1.200000 0.900000 0.000000
CONTROL
yaw 1.0 0.0 0 0 -1 1
SURFACE
rudder_lower
12 1 16 1
COMPONENT
5
SECTION
6.600000 0.000000 1.200000 0.900000 0.000000
CONTROL
yaw 1.0 0.0 0 0 -1 1
SECTION
6.600000 0.000000 0.800000 0.900000 0.000000
CONTROL
yaw 1.0 0.0 0 0 -1 1
